# Решение уравнений | Решение нелинейных уравнений
# Решение линейных уравнений
a3 := 0.3
a2 := 2
a1 := -6
a0 := 65
x0 := -15
xn := 5
h := 0.3
x := x0, x0 + h .. xn
A := [1.4, -0.7, 0.02; 0.15, 3, -0.2; 15, 0.1, 0.155]
F1(x) := a3*x^3 + a2*x^2 + a1*x + a0
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B := [11.3; 15; 12]
V := [a0; a1; a2; a3] = [65; -6; 2; 0.3]
X := [x1; x2; x3]  # error: Эта переменная не определена.
F2(x) := 90*|sin(x/2)|
X := polyroots(V) = [-10.5236; 1.92846 + 4.10727i; 1.92846 - 4.10727i]
x := 4
y := -20
Given
X1 := transpose(B)/transpose(A) = [4.27205, -16.8876, -325.11]
x1 := root(F1(x0), x0) = -10.5236
y - F1(x)
y - F2(x)
x := -7
x2 := root(F1(x)/(x - x1), x) = 1.92846 + 4.10727i
X2 := A^-1*B = [4.27205; -16.8876; -325.11]
[x1; y1] := Find(x, y) = [-7; -20]
x := 4
x3 := root(F1(x)/((x - x1)*(x - x2)), x) = 1.92846 - 4.10727i
x := 4
y := -1
X3 := lsolve(A, B) = [4.27205; -16.8876; -325.11]
a3*X[0]^3 + a2*X[0]^2 + a1*X[0] + a0 = 6.31349e-8
Given
y - F1(x)
y - F2(x)
[x1; y1] := Find(x, y) = [4; -1]
x := -4
y := -12
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Given
y - F1(x)
y - F2(x)
[x1; y1] := Minerr(x, y) = [-4; -12]
